*Heading
** Job name: Job-1 Model name: Model-1
** Generated by: Abaqus/CAE 2025
*Preprint, echo=NO, model=NO, history=NO, contact=NO
**
** PARTS
**
*Part, name=ref_01
*Node
      1,         -55.,          19.,          85.
      2,         -55.,          19.,         115.
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*Element, type=C3D4
    1, 4834, 4835, 4836, 4837
    2, 4834, 4838, 4839, 4840
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*Nset, nset=Set-1, generate
    1,  9004,     1
*Elset, elset=Set-1, generate
     1,  39894,      1
*Elset, elset=_Surf-1_S3, internal
    42,    61,   105,   157,   226,   281
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*Elset, elset=_Surf-1_S4, internal
   136,   240,   271,   336,   513,   536
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*Elset, elset=_Surf-1_S1, internal
   712,   747,   900,  1147,  2137,  2442
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*Elset, elset=_Surf-1_S2, internal
   414,  1014,  1225,  1226,  1311,  1834
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*Surface, type=ELEMENT, name=Surf-1
_Surf-1_S3, S3
_Surf-1_S4, S4
_Surf-1_S2, S2
_Surf-1_S1, S1
*Orientation, name=Ori-1
1., 0., 0., 0., 1., 0.
1, 90.
** Section: Section-1
*Solid Section, elset=Set-1, orientation=Ori-1, material=Material-1
,
*End Part
**
**
** ASSEMBLY
**
*Assembly, name=Assembly
**
*Instance, name=ref_01-1, part=ref_01
*End Instance
**
*Elset, elset=_Surf-1_S3, internal, instance=ref_01-1
   520,   576,  3601,  4388,  6457,  6701
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*Elset, elset=_Surf-1_S4, internal, instance=ref_01-1
  2832,  4093,  4494, 29798, 35817
*Elset, elset=_Surf-1_S1, internal, instance=ref_01-1
  3600, 13338, 24689, 25144, 26858, 29527, 29664, 29686, 29784, 32551
*Elset, elset=_Surf-1_S2, internal, instance=ref_01-1
  3613,  6452, 13932, 13987, 29654, 29725, 29787, 31412, 32903, 33040
*Surface, type=ELEMENT, name=Surf-1
_Surf-1_S3, S3
_Surf-1_S4, S4
_Surf-1_S2, S2
_Surf-1_S1, S1
*End Assembly
**
** MATERIALS
**
*Material, name=Material-1
*Conductivity, type=ORTHO
1.,1.,1.
*Density
1.,
*Specific Heat
1.,
**
** PREDEFINED FIELDS
**
** Name: Predefined Field-1   Type: Temperature
*Initial Conditions, type=TEMPERATURE
ref_01-1.Set-1, 50.
** ----------------------------------------------------------------
**
** STEP: Step-1
**
*Step, name=Step-1, nlgeom=NO, inc=1000
*Heat Transfer, end=PERIOD, deltmx=10.
0.001, 1., 1e-05, 0.01,
**
** INTERACTIONS
**
** Interaction: Int-1
*Sfilm
ref_01-1.Surf-1, F, 20., 0.1
**
** OUTPUT REQUESTS
**
*Restart, write, frequency=0
**
** FIELD OUTPUT: F-Output-1
**
*Output, field, variable=PRESELECT
**
** HISTORY OUTPUT: H-Output-1
**
*Output, history
*Radiation Output, variable=ALL
*Contact Output
HFLA, HTL, HTLA, SJD, SJDA, SJDE, SJDEA, SJDET, SJDETA, SJDR, SJDRA, SJDRT, SJDRTA, SJDT, SJDTA, WEIGHT
*End Step
